# Экспериментальные данные
table  # each column defines a variable
    № | U_N (mV) | U_T (V) | T_ст (°C)
    1 | 34.02 | 0.108 | 18.8
    2 | 65.01 | 0.214 | 18.8
    3 | 87.43 | 0.312 | 18.9
    4 | 109.45 | 0.417 | 19.1
    5 | 116.35 | 0.463 | 19.3
    6 | 135.43 | 0.593 | 19.6
    7 | 162.47 | 0.835 | 19.9
    8 | 168.76 | 0.900 | 20.2
    9 | 188.00 | 1.100 | 20.6
    10 | 187.30 | 1.120 | 21.0
end table
# Данные установки
R_N := 0.1 Ω
R_0 := 0.28736 Ω
l := 81.5 mm
d_1 := 0.189 mm
c_0 := 5.67*10^-8*W/(m^2*K^4)
ε(t) := (0.00013*t/K - 0.0025)
d_2 := 0.0025 m
# Расчёт
I_нити := U_N/R_N = [0.3402; 0.6501; 0.8743; 1.0945; 1.1635; 1.3543; 1.6247; 1.6876; 1.88; 1.873] A
R_нити := U_T/I_нити = [0.31746; 0.32918; 0.356857; 0.380996; 0.397937; 0.437865; 0.513941; 0.533302; 0.585106; 0.597971] Ω
R_T := R_нити/R_0 - 1 = [0.104748; 0.145532; 0.241846; 0.325849; 0.384804; 0.523749; 0.788492; 0.855866; 1.03614; 1.08091]
T_1 :=
    for i ∈ 0 .. 9
        C[i] ← (273.15 + 252.0*R_T[i]*2/(1 + sqrt(1 - 0.1485*R_T[i])))*K
    C
    = [299.65; 310.024; 334.652; 356.282; 371.547; 407.806; 478.034; 496.155; 545.158; 557.447] K
T_1 = [299.65; 310.024; 334.652; 356.282; 371.547; 407.806; 478.034; 496.155; 545.158; 557.447] K
q_l :=
    for i ∈ 0 .. 9
        C[i] ← I_нити[i, :]*U_T[i, :]/l
    C
q_l = [0.450817; 1.70701; 3.34701; 5.60008; 6.60982; 9.85399; 16.6457; 18.6361; 25.3742; 25.7394] W/m
q_lR :=
    for i ∈ 0 .. 9
        C[i] ← ε(T_1[i, :])*c_0*(T_1[i, :]^4 - T_ст[i, :]^4)*π*d_1
    C
q_lR = [0.000978494; 0.00251121; 0.00727145; 0.0130079; 0.0181058; 0.0345446; 0.0900485; 0.111033; 0.18617; 0.209828] W/m
q_lλ := q_l - q_lR = [0.449839; 1.7045; 3.33974; 5.58707; 6.59172; 9.81944; 16.5557; 18.525; 25.1881; 25.5296] W/m
# Произведём аппроксимацию полученных данных в OriginPro, ниже представлен график
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a := -12.7462
b := 0.01683/K
c := 9.42645*10^-5/K^2
q_lλ_fitting(t) := a + b*t + c*t^2
A := 1/(2*π)*ln(d_2/d_1)
B := b*K
C := 2*c*K
λ(T) := A*(B + C*T)
table  # each column defines a variable
    T_табличная (K) | λ_табличная (W/(m*K))
    273.15 | 0.0244
    373.15 | 0.0321
    473.15 | 0.0393
    573.15 | 0.0461
end table
λ_экспериментальная := λ(T_табличная)*W/(m*K)
λ_экспериментальная = [0.0280813; 0.0358296; 0.0435778; 0.0513261] W/(m*K)
# Построим график в OriginPro
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Δλ := |λ_экспериментальная - λ_табличная|/λ_табличная = [0.350341; 0.266302; 0.217514; 0.18543]
q_lλ_fitted_points := q_lλ_fitting(T_1)*W/m
q_lλ_fitted_points = [0.760923; 1.53176; 3.4429; 5.21567; 6.51988; 9.79391; 16.8401; 18.8091; 24.444; 25.9281] W/m
# Построим график в OriginPro
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# Расчёт случайной ошибки эксперимента
σ_B := 0.01883
σ_C := 2*(2.18934*10^-5)/K
σ_λ := A*sqrt(σ_B^2 + T_1^2*σ_C^2)
σ_λ = [0.00943229; 0.00954026; 0.00980603; 0.0100498; 0.0102272; 0.0106653; 0.0115713; 0.0118157; 0.0124955; 0.0126698]
σ_λ/λ(T_1) = [0.313006; 0.308363; 0.29854; 0.291107; 0.286434; 0.276913; 0.263245; 0.260486; 0.254194; 0.252843]
# Обработка данных по методу цилиндрического слоя
λ_ср := (1/(2*π)*ln(d_2/d_1))*q_l/(T_1 - T_ст) = [0.0240626; 0.0388149; 0.0322886; 0.0359438; 0.0343445; 0.0351989; 0.0369823; 0.0377662; 0.0414801; 0.0401771] W/(m*K)
T_m := (T_1 + T_ст)/2 = [295.8; 300.987; 313.351; 324.266; 331.998; 350.278; 385.542; 394.752; 419.454; 425.799] K
λ_m := 1/(2*π)*ln(d_2/d_1)*q_lλ/(T_1 - T_ст) = [0.0240104; 0.0387578; 0.0322185; 0.0358603; 0.0342504; 0.0350755; 0.0367823; 0.0375412; 0.0411758; 0.0398496] W/(m*K)
# Построим график в OriginPro
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